#include "../libdef.any"

// Find a detailed description of the model here
#include "Model/Description.any"

Main = {

  #define EVALUATE_MOMENT_ARMS 1

  // Input Parameters. To modify at each simulation
  #include "Input/InputVariables.any"

  // Values and files to parameter the model.
  #include "Model/LoadValues.any"
  #include "Model/LoadFiles.any"


  // Function to modify the humerus head and glen to display implants


  #include "<ANYBODY_PATH_MODELUTILS>\Operations\RunAppSequence.any"
  #include "Model/BMSettings.any"

  #include "<ANYBODY_PATH_BODY>/HumanModel.any"

  HumanModel = {

    // Create a node for Bergmann's force reference
    BodyModel.Right.ShoulderArm.Seg.Humerus.gh = {
      AnyRefNode Bergmann = {
        ARel = RotMat(90*pi/180,y);
        AnyDrawRefFrame drwref = {
          RGB = {0,1,0};
          ScaleXYZ = {1,1,1}/15;
        };
      };
    };
  };


  AnyFolder Model = {

    AnyFolder &BodyModel=.HumanModel.BodyModel;

    // Definition of the model environment
    #include "Model/Environment.any"

    AnyFolder ModelEnvironmentConnection = {
      #include "Model/JointsAndDrivers.any"
    };
  };

  AnyBodyStudy Study = {
    AnyFolder &Model = .Model;
    #if BallAndSocket == 1
        // Output variables collecting the GH forces in the pertinent coordinate frame
        AnyVec3 GHReactionInHumerus = -(Model.BodyModel.Right.ShoulderArm.Seg.Humerus.gh.Bergmann.Axes'
           *Model.BodyModel.Right.ShoulderArm.Jnt.GHReactions.ResultanForce.FTotalGlobal')';
    #endif

    // Lauranne
    //    tEnd = DesignVar(120.0); // 5;

    //For testing
    tEnd = 8.0; // 5;
    Gravity = {0.01, -9.81, 0.01};

    //Lauranne
    //nStep = 60;

    //For testing
    nStep = 30;


    InverseDynamics.Criterion.Type=MR_QuadraticAux;

    #if BallAndSocket == 0
    InverseDynamics.ForceDepKinOnOff=On;
    InverseDynamics.ForceDepKin.MaxIteration=50;

    AnyOutputFun ForceDepKinError = {
      Val = Main.Study.InverseDynamics.ForceDepKinError;
    };
    #endif

    //    Mesure of abduction angle (GH angle mesure is xzy)
    AnyVar rot = Main.HumanModel.BodyModel.Interface.Right.GlenohumeralAbduction.Pos[0]; // Total Abduction angle [rad]
    AnyVar rotD= rot*180/pi; // Total Abduction angle [deg]


    //Create output file results
    #if BallAndSocket ==0
    #include "Output/Output_File.any"
    #endif


//    MuscleEliminationTol = 1e-6;
  }; // End of study

}; //Main
